// COMSOL Multiphysics 6.1.0.252 model "ringing_plate_cluster_sweep.mph"
// Outline of the model tree

Parameters
  radius = 100[mm]
  thickness = 10[mm]
  ellipsity = 1.5
  radius_hole = 10[mm]

Common definitions
  mpf1: ParticipationFactors

Geometry
  geom1 "Geometry 1" (3D, length unit m)
    wp1: WorkPlane | unite = on
      e1: Ellipse | semiaxes = {radius * sqrt(ellipsity), radius / sqrt(ellipsity)}
      c1: Circle | r = radius_hole
      dif1: Difference | input = e1; input2 = c1
    ext1: Extrude | workplane = wp1; input = wp1; distance = thickness
    fin: Finalize "Form Union"

Materials
  mat1: Common "Cast iron" on all domains
    def "Basic"
      thermalexpansioncoefficient = 11e-6[1/K]
      density = 7000[kg/m^3]
      heatcapacity = 420[J/(kg*K)]
      thermalconductivity = 50[W/(m*K)]
    Enu "Young's modulus and Poisson's ratio"
      E = 140[GPa]
      nu = 0.25

Physics
  solid: SolidMechanics on all domains
    dependent variable u = {u, v, w}
    lemm1: LinearElasticModel "Linear Elastic Material 1" (default)
    free1: Free (default)
    init1: init "Initial Values 1" (default)
    fix1: Fixed "Fixed Constraint 1" on boundaries 5, 6, 8, 9

Mesh
  mesh1 "Mesh 1" (physics-controlled)
    size: MeshSizeDefault | hauto = 3

Studies
  std1 "Study 1"
    clusw: ClusterSweep
      pname = ellipsity
      plistarr = range(1.0,0.5,5)
      batchfile = batchmodel_ringing_sweep.mph
      synchsolutions = on
      savefile = on
      clustersettings = on
      remotesettings = on
    eig: Eigenfrequency | shift = 1[Hz]

Solver configurations
  sol1 "Solution 1" (study std1)
    v1: Variables "Dependent Variables 1"
    e1: Eigenvalue "Eigenvalue Solver 1"
      transform = eigenfrequency
      shift = 1[Hz]
      eigvfunscale = maximum
      eigvfunscaleparam = 2.84e-07
      dDef: Direct
  sol2 "Parametric Solutions 1" (study std1)

Datasets
  dset1: Solution | solution = sol1
  dset2: Solution | solution = sol2

Evaluation groups
  std1EvgFrq: EvaluationGroup "Eigenfrequencies (Study 1)" | data = dset2
    gev1: EvalGlobal "Global Evaluation 1"
      expr = {freq*2*pi, ellipsity, imag(freq)/abs(freq), abs(freq)/imag(freq)/2}
      unit = {rad/s, , 1, 1}
      descr = {Angular frequency, , Damping ratio, Quality factor}
  std1mpf1: EvaluationGroup "Participation Factors (Study 1)" | data = dset1
    gev1: EvalGlobal "Global Evaluation 1"
      expr = {mpf1.pfLnormX, mpf1.pfLnormY, mpf1.pfLnormZ, mpf1.pfRnormX, mpf1.pfRnormY, mpf1.pfRnormZ, mpf1.mEffLX, mpf1.mEffLY, mpf1.mEffLZ, mpf1.mEffRX, mpf1.mEffRY, mpf1.mEffRZ}
      unit = {1, 1, 1, 1, 1, 1, kg, kg, kg, kg*m^2, kg*m^2, kg*m^2}
      descr = {"Participation factor, normalized, X-translation", "Participation factor, normalized, Y-translation", "Participation factor, normalized, Z-translation", "Participation factor, normalized, X-rotation", "Participation factor, normalized, Y-rotation", "Participation factor, normalized, Z-rotation", "Effective modal mass, X-translation", "Effective modal mass, Y-translation", "Effective modal mass, Z-translation", "Effective modal mass, X-rotation", "Effective modal mass, Y-rotation", "Effective modal mass, Z-rotation"}
  std1mpf11: EvaluationGroup "Participation Factors (Study 1) 1" | data = dset2
    gev1: EvalGlobal "Global Evaluation 1"
      expr = {mpf1.pfLnormX, mpf1.pfLnormY, mpf1.pfLnormZ, mpf1.pfRnormX, mpf1.pfRnormY, mpf1.pfRnormZ, mpf1.mEffLX, mpf1.mEffLY, mpf1.mEffLZ, mpf1.mEffRX, mpf1.mEffRY, mpf1.mEffRZ}
      unit = {1, 1, 1, 1, 1, 1, kg, kg, kg, kg*m^2, kg*m^2, kg*m^2}
      descr = {"Participation factor, normalized, X-translation", "Participation factor, normalized, Y-translation", "Participation factor, normalized, Z-translation", "Participation factor, normalized, X-rotation", "Participation factor, normalized, Y-rotation", "Participation factor, normalized, Z-rotation", "Effective modal mass, X-translation", "Effective modal mass, Y-translation", "Effective modal mass, Z-translation", "Effective modal mass, X-rotation", "Effective modal mass, Y-rotation", "Effective modal mass, Z-rotation"}

Plots
  pg1: PlotGroup3D "Mode Shape (solid)" | data = dset1
    surf1: Surface | expr = solid.disp
      def: Deform "Deformation" | expr = {u, v, w}
  pg2: PlotGroup3D "Mode Shape (solid) 1" | data = dset2
    surf1: Surface | expr = solid.disp
      def: Deform "Deformation" | expr = {u, v, w}
  pg3: PlotGroup1D "1D Plot Group 3" | data = none
    ptgr1: PointGraph on all points | data = dset2; expr = freq; xdata = expr; xdataexpr = ellipsity